# 3d Lennard-Jones melt

units		lj
atom_style	charge
atom_modify map array

lattice		fcc 0.8442
region		box block 0 10 0 10 0 10
create_box	1 box

create_atoms	1 box

mass		1 1.0

set type 1 charge   0.0

velocity	all create 3.0 87287 loop geom

pair_style	lj/cut 5.0
pair_coeff	1 1 {eps: 1.0} {sig: 1.0} 5.0

neighbor	0.3 bin
neigh_modify	every 20 delay 0 check no
